# W18x50
h := 18 in = 457.2 mm
b_f := 7.5 in = 190.5 mm
t_f := 0.57 in = 14.478 mm
t_w := 0.355 in = 9.017 mm
A_g := 2*t_f*b_f + (h - 2*t_f)*t_w = 9377.59 mm^2
I_x := (2*(b_f*t_f^3/12 + b_f*t_f*((h - 2*t_f)/2 + t_f/2)^2) + t_w*(h - 2*t_f)^3/12) = 329403905 mm^4
S_x := I_x/(h/2) = 1440962 mm^3
Z_x := b_f*t_f*(h - t_f) + 1/4*(h - 2*t_f)^2*t_w = 1634467 mm^3
r_x := sqrt(I_x/A_g) = 187.421 mm
I_y := 2*(t_f*b_f^3/12) + (h - 2*t_f)*t_w^3/12 = 16707939 mm^4
S_y := I_y/(b_f/2) = 175411 mm^3
Z_y := 1/2*b_f^2*t_f + 1/4*(h - 2*t_f)*t_w^2 = 271410 mm^3
r_y := sqrt(I_y/A_g) = 42.21 mm
c_w := (h - t_f)^2*b_f^3*t_f/24 = 8.17419e11 mm^6
J := (2*b_f*t_f^3 + (h - t_f)*t_w^3)/3 = 493608 mm^4
r_ts := sqrt(sqrt(I_y*c_w)/S_x) = 50.6426 mm
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h_0 := h - t_f = 442.722 mm
c := 1
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l := 35 ft = 10668 mm
w := 1.2*(0.45 kip/ft) + 1.6*(0.75 kip/ft) = 1.74 kip/ft
w := 1.2*(6.567 kN/m) + 1.6*(10.945 kN/m) = 25.3924 kN/m
M := w*l^2/8 = 266.427 kip*ft
M := w*l^2/8 = 361.227 kN*m
F_y := 50 ksi = 344.738 MPa
E := 29000 ksi = 199948 MPa
ϕM_n1 := 0.9*F_y*Z_x = 374.03 kip*ft
M := w*l^2/8 = 266.427 kip*ft
ϕM_n1 := 0.9*F_y*Z_x = 507.116 kN*m
M := w*l^2/8 = 361.227 kN*m
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L_b := 35 ft/3 = 3.556 m
L_p := 1.76*r_y*sqrt(E/F_y) = 1.78913 m
L_r := 1.95*r_ts*E/(0.7*F_y)*sqrt(J*c/(S_x*h_0) + sqrt((J*c/(S_x*h_0))^2 + 6.76*(0.7*F_y/E)^2)) = 5.17866 m
ϕM_n2 := 0.9*(F_y*Z_x - (F_y*Z_x - 0.7*F_y*S_x)*(L_b - L_p)/(L_r - L_p)) = 405.905 kN*m
M := w*l^2/8 = 361.227 kN*m
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L_b := 35 ft/2 = 5.334 m
C_b := 1.3
F_cr := C_b*π^2*E/(L_b/r_ts)^2*sqrt(1 + 0.078*J*c/(S_x*h_0)*(L_b/r_ts)^2) = 298.801 MPa
ϕM_n3 := 0.9*F_cr*S_x = 387.505 kN*m
M := w*l^2/8 = 361.227 kN*m
F_cr := π^2*E/(L_b/r_ts)^2*sqrt(1 + 0.078*J*c/(S_x*h_0)*(L_b/r_ts)^2) = 229.847 MPa
ϕM_n3 := 0.9*F_cr*S_x = 298.081 kN*m
M := w*l^2/8 = 361.227 kN*m
