# W18x50
h := 18 in
b_f := 7.5 in
t_f := 0.57 in
t_w := 0.355 in
A_g := 2*t_f*b_f + (h - 2*t_f)*t_w = 14.5353 in^2
I_x := (2*(b_f*t_f^3/12 + b_f*t_f*((h - 2*t_f)/2 + t_f/2)^2) + t_w*(h - 2*t_f)^3/12) = 791.396 in^4
S_x := I_x/(h/2) = 87.9329 in^3
Z_x := b_f*t_f*(h - t_f) + 1/4*(h - 2*t_f)^2*t_w = 99.7413 in^3
r_x := sqrt(I_x/A_g) = 7.37879 in
I_y := 2*(t_f*b_f^3/12) + (h - 2*t_f)*t_w^3/12 = 40.141 in^4
S_y := I_y/(b_f/2) = 10.7043 in^3
Z_y := 1/2*b_f^2*t_f + 1/4*(h - 2*t_f)*t_w^2 = 16.5624 in^3
r_y := sqrt(I_y/A_g) = 1.66181 in
c_w := (h - t_f)^2*b_f^3*t_f/24 = 3043.98 in^6
J := (2*b_f*t_f^3 + (h - t_f)*t_w^3)/3 = 1.1859 in^4
r_ts := sqrt(sqrt(I_y*c_w)/S_x) = 1.9938 in
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h_0 := h - t_f = 17.43 in
c := 1
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l := 35 ft
w := 1.2*(0.45 kip/ft) + 1.6*(0.75 kip/ft) = 1.74 kip/ft
M := w*l^2/8 = 266.438 kip*ft
F_y := 50 ksi = 344.738 MPa
E := 29000 ksi
ϕM_n1 := 0.9*F_y*Z_x = 374.03 kip*ft
M := w*l^2/8 = 266.438 kip*ft
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L_b := 35 ft/3 = 11.6667 ft
L_p := 1.76*r_y*sqrt(E/F_y) = 5.86986 ft
L_r := 1.95*r_ts*E/(0.7*F_y)*sqrt(J*c/(S_x*h_0) + sqrt((J*c/(S_x*h_0))^2 + 6.76*(0.7*F_y/E)^2)) = 16.9904 ft
ϕM_n2 := 0.9*(F_y*Z_x - (F_y*Z_x - 0.7*F_y*S_x)*(L_b - L_p)/(L_r - L_p)) = 299.38 kip*ft
M := w*l^2/8 = 266.438 kip*ft
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L_b := 35 ft/2 = 17.5 ft
C_b := 1.3
F_cr := C_b*π^2*E/(L_b/r_ts)^2*sqrt(1 + 0.078*J*c/(S_x*h_0)*(L_b/r_ts)^2) = 43.3374 ksi
ϕM_n3 := 0.9*F_cr*S_x = 285.809 kip*ft
M := w*l^2/8 = 266.438 kip*ft
F_cr := π^2*E/(L_b/r_ts)^2*sqrt(1 + 0.078*J*c/(S_x*h_0)*(L_b/r_ts)^2) = 33.3365 ksi
ϕM_n3 := 0.9*F_cr*S_x = 219.853 kip*ft
M := w*l^2/8 = 266.438 kip*ft
