# Example D.1 W-Shape Tension Member
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# Section | Material
# W8x21
F_u := 65 ksi = 448.159 MPa
d := 8.28 in = 210.312 mm
F_y := 50 ksi = 344.738 MPa
b_f := 5.27 in = 133.858 mm
t_f := 0.4 in = 10.16 mm
t_w := 0.25 in = 6.35 mm
A_g := 2*t_f*b_f + (d - 2*t_f)*t_w = 6.086 in^2
A_g := 2*t_f*b_f + (d - 2*t_f)*t_w = 3926.44 mm^2
I_x := b_f*d^3/12 - (b_f - t_w)*(d - 2*t_f)^3/12 = 74.2226 in^4
I_x := b_f*d^3/12 - (b_f - t_w)*(d - 2*t_f)^3/12 = 30893799 mm^4
r_x := sqrt(I_x/A_g) = 3.49223 in
r_x := sqrt(I_x/A_g) = 88.7025 mm
I_y := (d - 2*t_f)*t_w^3/12 + t_f*b_f^3/12*2 = 9.76729 in^4
I_y := (d - 2*t_f)*t_w^3/12 + t_f*b_f^3/12*2 = 4065451 mm^4
r_y := sqrt(I_y/A_g) = 1.26684 in
r_y := sqrt(I_y/A_g) = 32.1777 mm
# Flange Connection
U_1 := 2*b_f*t_f/A_g = 0.692737
L := 25 ft = 7.62 m
L/r_x = 85.9051
x := (b_f*t_f*t_f/2 + (d/2 - t_f)*t_w*((d/2 - t_f)/2 + t_f))/(b_f*t_f + (d/2 - t_f)*t_w) = 21.2353 mm
L/r_y = 236.81
l := 9 in = 228.6 mm
d_b := (13/16) in = 20.6375 mm
U_2 := 1 - x/l = 0.907107
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BoltN := 4
# Flange Connection
U_3 := if(BoltN ≥ 3, if(b_f < 2/3*d, 0.85, 0.9), 0) = 0.85
U := max(U_1, U_2, U_3) = 0.907107
A_n := A_g - 4*(d_b + (1/16) in)*t_f = 4.686 in^2
A_n := A_g - 4*(d_b + (1/16) in)*t_f = 3023.22 mm^2
A_e := A_n*U = 4.25071 in^2
A_e := A_n*U = 2742.38 mm^2
ϕP_n1 := 0.9*A_g*F_y = 273.87 kip
ϕP_n1 := 0.9*A_g*F_y = 1218.23 kN
ϕP_n2 := 0.75*A_e*F_u = 207.222 kip
ϕP_n2 := 0.75*A_e*F_u = 921.769 kN
ϕP_n := min(ϕP_n1, ϕP_n2) = 207.222 kip
ϕP_n := min(ϕP_n1, ϕP_n2) = 921.769 kN
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A_e := 0.75*A_g = 4.5645 in^2
A_e := 0.75*A_g = 2944.83 mm^2
ϕP_n1 := 0.9*A_g*F_y = 273.87 kip
ϕP_n1 := 0.9*A_g*F_y = 1218.23 kN
ϕP_n2 := 0.75*A_e*F_u = 222.519 kip
ϕP_n2 := 0.75*A_e*F_u = 989.815 kN
ϕP_n := min(ϕP_n1, ϕP_n2) = 222.519 kip
ϕP_n := min(ϕP_n1, ϕP_n2) = 989.815 kN
# Example D.2 Single Angle Tension Member
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# Section | Material
# L shape
F_y := 36 ksi
F_u := 58 ksi
h := 4 in = 101.6 mm
b := 4 in = 101.6 mm
t := 0.5 in = 12.7 mm
x := (b*t*t/2 + (h - t)*t*(t + (h - t)/2))/(b*t + (h - t)*t) = 1.18333 in
x := (b*t*t/2 + (h - t)*t*(t + (h - t)/2))/(b*t + (h - t)*t) = 30.0567 mm
A_g := b*t + (h - t)*t = 3.75 in^2
A_g := b*t + (h - t)*t = 2419.35 mm^2
l := 9 in
l = 228.6 mm
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U_1 := (b*t - t^2/2)/A_g = 0.5
U_2 := 1 - x/l = 0.868519
U_3 := 0.8
U := max(U_1, U_2, U_3) = 0.868519
d_b := (13/16) in
A_n := A_g - (d_b + (1/16) in)*t = 3.3125 in^2
A_n := A_g - (d_b + (1/16) in)*t = 2137.09 mm^2
A_e := A_n*U = 2.87697 in^2
A_e := A_n*U = 1856.1 mm^2
ϕP_n1 := 0.9*A_g*F_y = 121.5 kip
ϕP_n1 := 0.9*A_g*F_y = 540.459 kN
ϕP_n2 := 0.75*A_e*F_u = 125.148 kip
ϕP_n2 := 0.75*A_e*F_u = 556.686 kN
ϕP_n := min(ϕP_n1, ϕP_n2) = 121.5 kip
ϕP_n := min(ϕP_n1, ϕP_n2) = 540.459 kN
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A_e := 0.75*A_g = 2.8125 in^2
A_e := 0.75*A_g = 1814.51 mm^2
ϕP_n1 := 0.9*A_g*F_y = 121.5 kip
ϕP_n1 := 0.9*A_g*F_y = 540.459 kN
ϕP_n2 := 0.75*A_e*F_u = 122.344 kip
ϕP_n2 := 0.75*A_e*F_u = 544.212 kN
ϕP_n := min(ϕP_n1, ϕP_n2) = 121.5 kip
ϕP_n := min(ϕP_n1, ϕP_n2) = 540.459 kN
